# OpenSim document version 40500
ScaleTool 3DGaitModelwithSimpleArms-scaled:
  mass: 75.1646 [kg]
  height: -1
  age: -1
  GenericModelMaker:
    marker_set_file: body_IBEC.xml
  ModelScaler:
    apply: true
    time_range: -1 -1
    preserve_mass_distribution: false
  MarkerPlacer:
    apply: true
    time_range: -1 -1
    max_marker_movement: -1
    IKTaskSet:
      IKMarkerTask stn3: apply=true weight=1
      IKMarkerTask shoulder: apply=true weight=1
      IKMarkerTask stn2: apply=true weight=1
      IKMarkerTask stn1: apply=true weight=1
      IKMarkerTask ua1: apply=true weight=1
      IKMarkerTask ua4: apply=true weight=1
      IKMarkerTask fa3: apply=true weight=1
      IKMarkerTask fa4: apply=true weight=1
      IKMarkerTask wristM: apply=true weight=1
      IKMarkerTask fa2: apply=true weight=1
      IKMarkerTask ua2: apply=true weight=1
      IKMarkerTask ua3: apply=true weight=1
      IKMarkerTask wristL: apply=true weight=1
      IKMarkerTask fa1: apply=true weight=1
      IKMarkerTask thumb3: apply=true weight=1
      IKMarkerTask thumb1: apply=true weight=1
      IKMarkerTask thumb2: apply=true weight=1
      IKMarkerTask idx3: apply=true weight=1
      IKMarkerTask idx1: apply=true weight=1
      IKMarkerTask idx2: apply=true weight=1
      IKMarkerTask EL: apply=true weight=1
      IKMarkerTask EM: apply=true weight=1
